a := 34
b := 35 + 15j
g := 55.345
ght := (a*b + b - a)^(g/100) explicit, ALL → (34*(35 + 15i) + 35 + 15i - 34)^(55.345/100) = 51.539 + 12.0557i
gt := a + b explicit, ALL → 34 + 35 + 15i = 69 + 15i
dd := a + b explicit, ALL → 34 + 35 + 15i = 69 + 15i
