# "вариант 1 : два блока на ру вн и 1 блок на ру сн
# вариант 2: все три блока на ру вн
800*6/100 = 48
S_bl := (800 - 800*6/100)/(0.85*1) = 884.706  # МВА
N_op.1.11 := 2*(0.166*3) + 1*0.01*3 + 4*0.17*1000/100 + 3*0.2*1000/100 = 13.826
N_op.8 := 2*(0.166*3) + 1*0.01*3 + 4*0.17*1400/100 + 3*0.2*1400/100 = 18.946
0.17*1000/100 = 1.7
N_op.6.7 := 2*2*(0.166*3) + 1*2*0.01*3 = 2.052
0.17*1400/100 = 2.38
N_op.3.10 := 2*0.166*3 + 1*0.01*3 + 4*(1 + 0.2 + 0.75) + 3*(0.024*3 + 0.02 + 0.012) = 9.138
N_op.4.5.13 := 2*(0.166*3) + 1*0.01*3 + 4*1 + 3*0.024*3 = 5.242
N_op.2 := 4*(1 + 0.2 + 0.75 + 0.17*1000/100) + 3*(0.024*3 + 0.02 + 0.012 + 0.2*1000/100) = 20.912
N_op.9 := 4*(1 + 0.2 + 0.75 + 0.17*1400/100) + 3*(0.024*3 + 0.02 + 0.012 + 0.2*1400/100) = 26.032
N_op.12 := 4*(1 + 0.17*1000/100) + 3*(0.024*3 + 0.2*1000/100) = 17.016
0.2*1000/100 = 2
w_1.11 := 0.2*0.25 + 0.007*N_op.1.11 = 0.146782
0.2*1400/100 = 2.8
0.024*3 = 0.072
w_8 := 0.2*0.25 + 0.007*N_op.8 = 0.182622
0.024*3 + 0.02 + 0.012 = 0.104
w_6.7 := 0.2*0.25 + 0.007*N_op.6.7 = 0.064364
w_3.10 := 0.2*0.25 + 0.007*N_op.3.10 = 0.113966
w_4.5.13 := 0.2*0.25 + 0.007*N_op.4.5.13 = 0.086694
w_2 := 0.2*0.25 + 0.007*N_op.2 = 0.196384
w_9 := 0.2*0.25 + 0.007*N_op.9 = 0.232224
w_12 := 0.2*0.25 + 0.007*N_op.12 = 0.169112
0.01*3 = 0.03
q := (0.25*75 + 0.2*271)/8760 = 0.00832763
T := 75 - 75^2/(2*271) = 64.6218
W_1 := 0 + 0.147*q*(800*T) = 63.286
W_2 := 0.196*800*1 + 0.196*q*800*(11 + 64.62) = 255.542
W_3 := w_3.10*800*1 + w_3.10*q*800*(10 + 64.62 + 64.62) = 196.891
W_4 := w_4.5.13*800*0 + w_4.5.13*q*800*1 = 0.577564
W_5 := w_4.5.13*800*0 + w_4.5.13*q*800*2 = 1.15513
W_6 := w_6.7*800*0 + w_6.7*q*800*2 = 0.857599
W_7 := w_6.7*800*0 + w_6.7*q*800*4 = 1.7152
W_8 := w_8*800*0 + w_8*q*800*64.62 = 78.6197
W_9 := w_9*800*1 + w_9*q*800*(8 + 64.62) = 298.13
W_10 := w_3.10*800*1 + w_3.10*q*800*(7 + 64.62 + 64.62) = 194.613
W_11 := w_1.11*800*0 + w_1.11*q*800*1 = 0.977876
W_12 := w_12*800*0 + w_12*q*800*0 = 0
W_13 := w_4.5.13*800*0 + w_4.5.13*q*800*2 = 1.15513
W_sh1 := 0.104*q*800*6 = 4.15715
W_sh2 := 0.104*q*800*12 = 8.3143
W_sh3 := 0.104*q*800*6 = 4.15715
W_sh4 := 0.104*q*800*12 = 8.3143
W_l1 := 2.8*q*800*1 = 18.6539
W_l2.1 := 2*q*800*1 = 13.3242
Mu_1 := 7408/8760*W_1*10^3*3*1.2*10^-5 = 1.92667
Mu_2 := 7408/8760*W_2*10^3*3*1.2*10^-5 = 7.77969
Mu_3 := 7408/8760*W_3*10^3*3*1.2*10^-5 = 5.99412
Mu_4 := 7408/8760*W_4*10^3*3*1.2*10^-5 = 0.0175833
Mu_5 := 7408/8760*W_5*10^3*3*1.2*10^-5 = 0.0351665
Mu_6 := 7408/8760*W_6*10^3*3*1.2*10^-5 = 0.0261086
Mu_7 := 7408/8760*W_7*10^3*3*1.2*10^-5 = 0.0522172
Mu_8 := 7408/8760*W_8*10^3*3*1.2*10^-5 = 2.39348
Mu_9 := 7408/8760*W_9*10^3*3*1.2*10^-5 = 9.07621
Mu_10 := 7408/8760*W_10*10^3*3*1.2*10^-5 = 5.92478
Mu_11 := 7408/8760*W_11*10^3*3*1.2*10^-5 = 0.0297703
Mu_12 := 7408/8760*W_12*10^3*3*1.2*10^-5 = 0
Mu_13 := 7408/8760*W_13*10^3*3*1.2*10^-5 = 0.0351665
Mu_l1 := 7408/8760*W_l1*10^3*3*1.2*10^-5 = 0.567896
Mu_l2.1 := 7408/8760*W_l2.1*10^3*3*1.2*10^-5 = 0.40564
Mu_sh1 := 7408/8760*W_sh1*10^3*3*1.2*10^-5 = 0.12656
Mu_sh2 := 7408/8760*W_sh2*10^3*3*1.2*10^-5 = 0.253119
Mu_sh3 := 7408/8760*W_sh3*10^3*3*1.2*10^-5 = 0.12656
Mu_sh4 := 7408/8760*W_sh4*10^3*3*1.2*10^-5 = 0.253119
Mu := 1*(Mu_1 + Mu_2 + Mu_3 + Mu_4 + Mu_5 + Mu_6 + Mu_7 + Mu_8 + Mu_9 + Mu_10 + Mu_11 + Mu_12 + Mu_13 + Mu_sh1 + Mu_sh2 + Mu_sh3 + Mu_sh4 + Mu_l1 + Mu_l2.1) = 35.0239
W := W_1 + W_2 + W_3 + W_4 + W_5 + W_6 + W_7 + W_8 + W_9 + W_10 + W_11 + W_12 + W_13 + W_sh1 + W_sh2 + W_sh3 + W_sh4 + W_l1 + W_l2.1 = 1150.44
K_vikl := 170.5
K_vikl*13 = 2216.5
I_ao := 8.4/100*K_vikl*13 = 186.186
Z := 0.12*K_vikl*13 + I_ao + Mu = 487.19
inom := 800*1000/(0.85*sqrt(3)*750) = 724.518
iprod := 1.05*inom = 760.744
